<?xml version="1.0" ?>
<Node name="root" dt="0.05" showBoundingTree="0" gravity="0 -9.8 0">
    <VisualStyle displayFlags="showBehaviorModels showVisual" />

    <RequiredPlugin name="Sofa.Component.Collision.Detection.Algorithm"/> <!-- Needed to use components [BVHNarrowPhase,BruteForceBroadPhase] -->
    <RequiredPlugin name="Sofa.Component.Collision.Detection.Intersection"/> <!-- Needed to use components [MinProximityIntersection] -->
    <RequiredPlugin name="Sofa.Component.Collision.Geometry"/> <!-- Needed to use components [TriangleCollisionModel] -->
    <RequiredPlugin name="Sofa.Component.Constraint.Projective"/> <!-- Needed to use components [FixedProjectiveConstraint] -->
    <RequiredPlugin name="Sofa.Component.Engine.Select"/> <!-- Needed to use components [BoxROI] -->
    <RequiredPlugin name="Sofa.Component.IO.Mesh"/> <!-- Needed to use components [MeshGmshLoader,MeshOBJLoader] -->
    <RequiredPlugin name="Sofa.Component.LinearSolver.Iterative"/> <!-- Needed to use components [CGLinearSolver] -->
    <RequiredPlugin name="Sofa.Component.Mapping.Linear"/> <!-- Needed to use components [IdentityMapping] -->
    <RequiredPlugin name="Sofa.Component.Mass"/> <!-- Needed to use components [DiagonalMass] -->
    <RequiredPlugin name="Sofa.Component.MechanicalLoad"/> <!-- Needed to use components [PlaneForceField] -->
    <RequiredPlugin name="Sofa.Component.ODESolver.Backward"/> <!-- Needed to use components [EulerImplicitSolver] -->
    <RequiredPlugin name="Sofa.Component.SceneUtility"/> <!-- Needed to use components [InfoComponent] -->
    <RequiredPlugin name="Sofa.Component.SolidMechanics.FEM.Elastic"/> <!-- Needed to use components [TetrahedronFEMForceField,TriangularFEMForceField] -->
    <RequiredPlugin name="Sofa.Component.SolidMechanics.Spring"/> <!-- Needed to use components [TriangularBendingSprings] -->
    <RequiredPlugin name="Sofa.Component.StateContainer"/> <!-- Needed to use components [MechanicalObject] -->
    <RequiredPlugin name="Sofa.Component.Topology.Container.Dynamic"/> <!-- Needed to use components [TetrahedronSetGeometryAlgorithms,TetrahedronSetTopologyConta
    iner,TetrahedronSetTopologyModifier,TriangleSetGeometryAlgorithms,TriangleSetTopologyContainer,TriangleSetTopologyModifier] -->
    <RequiredPlugin name="Sofa.Component.Topology.Mapping"/> <!-- Needed to use components [Tetra2TriangleTopologicalMapping] -->
    <RequiredPlugin name="Sofa.Component.Visual"/> <!-- Needed to use components [VisualStyle] -->
    <RequiredPlugin name="Sofa.GL.Component.Rendering3D"/> <!-- Needed to use components [OglModel] -->
    <RequiredPlugin name="Sofa.Component.Collision.Response.Contact"/> <!-- Needed to use components [CollisionResponse] -->

    <DefaultAnimationLoop />
    <DefaultVisualManagerLoop />
    <CollisionPipeline name="CollisionPipeline" verbose="0" depth="1"/>
    <BruteForceBroadPhase/>
    <BVHNarrowPhase/>
    <CollisionResponse name="CollisionResponse" response="PenalityContactForceField" />
	<MinProximityIntersection name="Proximity" alarmDistance="0.8" contactDistance="0.5" />

    <Node name="Liver">
        <EulerImplicitSolver name="cg_odesolver" rayleighStiffness="0.1" rayleighMass="0.1" />
        <CGLinearSolver iterations="25" name="linear solver" tolerance="1.0e-9" threshold="1.0e-9" />
        <MeshGmshLoader name="loader" filename="./mesh/liver2.msh" />
        <MechanicalObject src="@loader" name="Volume" scale3d="20 20 20" rotation="140 180 0"/>

		<TetrahedronSetTopologyContainer  name="Container" position="@Volume.position" src="@loader" tags=" "/>
		<TetrahedronSetTopologyModifier   name="Modifier" />
		<TetrahedronSetGeometryAlgorithms name="TopoAlgo"  template="Vec3d" />

        <DiagonalMass massDensity="1.0" />
        <BoxROI template="Vec3d" box="4 -4 -3 10 2 3" drawBoxes="1" position="@Volume.rest_position" name="FixedROI"/>
		<TetrahedronFEMForceField name="FEM" youngModulus="1300" poissonRatio="0.3" computeGlobalMatrix="false" method="large" />
		<PlaneForceField normal="0 1 0" d="-50" stiffness="100000" showPlane="1" showPlaneSize="20"/>
        <Node name="Surface">
            <TriangleSetTopologyContainer  name="Container" fileTopology="" tags=" " />
			<TriangleSetTopologyModifier   name="Modifier" />
			<TriangleSetGeometryAlgorithms name="TopoAlgo"   template="Vec3d" />

            <Tetra2TriangleTopologicalMapping input="@../Container" output="@Container" />
			<TriangularBendingSprings name="FEM-Bend" stiffness="600" damping="1.0" />
			<TriangleCollisionModel />

            <Node name="Visu_liver">
                <OglModel name="VisualLiver" />
                <IdentityMapping input="@../../Volume" output="@VisualLiver" />
            </Node>
        </Node>
    </Node>


    <Node name="flag">
        <EulerImplicitSolver name="cg_odesolver" printLog="false" />
        <CGLinearSolver iterations="25" name="linear solver" tolerance="1.0e-9" threshold="1.0e-9" />
        <MeshOBJLoader name="meshLoader" filename="mesh/flag.obj" rotation="0 180 0" scale="10" createSubelements="true" translation="0 5 50"/>
        <TriangleSetTopologyContainer  name="Container" src="@meshLoader" tags=" " />
		<TriangleSetTopologyModifier   name="Modifier" />
		<TriangleSetGeometryAlgorithms name="TopoAlgo"   template="Vec3d" />

        <MechanicalObject/>
        <DiagonalMass massDensity="0.1" />
        <FixedProjectiveConstraint indices="317 221 316 207 206 213" />
        <TriangularFEMForceField name="FEM" youngModulus="600" poissonRatio="0.3" method="large" />
        <TriangularBendingSprings name="FEM-Bend" stiffness="300" damping="1.0" />
        <TriangleCollisionModel />
        <PlaneForceField normal="0 1 0" d="-50" stiffness="100000" showPlane="1" showPlaneSize="20"/>
		<Node name="visu_flag">
            <MeshOBJLoader name="meshLoaderVisu" filename="./mesh/flag.obj" handleSeams="1" />
            <OglModel  name="VisualFlag" src="@meshLoaderVisu"/>
			<IdentityMapping input="@../" output="@VisualFlag" />
		</Node>
    </Node>
</Node>
